# Силовой расчёт
g := 9.807
# Силовой расчет механизма проводится в положении 2
# Угловая координата коромысла 1
ϕ_Н := 60.523°
ϕ_1 := ϕ_Н + 10° = 70.523°
# Моменты инерции звеньев механизма
J_1S := 0.055*g = 0.539385  # кг*м^2
J_2S := 0.0050*g = 0.049035  # кг*м^2
# Массы звеньев механизма
m_1 := 10  # кг
m_2 := 3  # кг
m_3 := 4  # кг
# Длины звеньев
l_OA := 0.203  # м
l_AB := 0.242  # м
# Из первого листа для положения 2 механизма:
# угловая скорость
ω_1 := 18.901  # рад/c
# угловое ускорение
ε_1 := 1327.026  # рад/c^2
# Момент сопротивления, действующий на звено 1
M_с := 980.7  # Н*м
# Построение плана скоростей механизма
# Выбранный масштаб скоростей
μ_V := 50  # мм/(м*с^-1)
# Скорость точки A
V_A := ω_1*l_OA = 3.8369  # м/с
P_Va := V_A*μ_V = 191.845  # мм
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# для точки B
P_Vb := 213.82  # мм
V_B := P_Vb/μ_V = 4.2764  # м/с
# Скорость точки B относительно точки A
ba := 71.98  # м/с
V_BA := ba/μ_V = 1.4396  # м/с
# На отрезке ba отложим отрезок as_2 пропорциональный  AS_2 на схеме механизма
λ_s2 := 0.32  # - относительное положение ЦМ на шатуне
as_2 := λ_s2*ba = 23.0336  # мм
# Откуда
P_Vs_2 := 196.17  # мм
V_S2 := P_Vs_2/μ_V = 3.9234  # м/с
# Угловая скорость второго звена
ω_2 := V_BA/l_AB = 5.94876  # рад/c
# Построение плана ускорений механизма
# Для нахождения  ускорений центров масс звеньев и угловых ускорений звеньев, необходимо  построить план ускорений механизма. Выбираем масштаб ускорений
μ_a := 0.8  # мм/(м*с^-2)
a_S1 := 0  # м/с^2
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# Определяем ускорение точки А:
# Нормальное ускорение точки А:
a_An := ω_1^2*l_OA = 72.5213  # м/с^2
τ_aa' := a_An*μ_a = 58.017  # мм
# Тангенциальное ускорение точки А:
a_Aτ := ε_1*l_OA = 269.386  # м/с^2
P_aτ_a := a_Aτ*μ_a = 215.509
# Полное ускорение точки А:
a_A := sqrt(a_An^2 + a_Aτ^2) = 278.977  # м/с^2
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# Ускорение точки B:
# Нормальное ускорение точки B относительно A
a_BAn := ω_2^2*l_AB = 8.56384  # м/с^2
a'n_ba := a_BAn*μ_a = 6.85107  # мм
# по плану ускорений находим неизвестные составляющие
n_bab' := 22.88  # мм
# =>
a_BAτ := n_bab'/μ_a = 28.6  # м/с^2
# Угловое ускорение 2-го звена
ε_2 := a_BAτ/l_AB = 118.182  # рад/с^2
P_ab' := 239.13  # мм
# =>
a_B := P_ab'/μ_a = 298.912  # м/с^2
a_S3 := a_B
b'a' := 23.88  # мм
# На отрезке b'a' отложим отрезок a's_2' пропорциональный  AS_2 на схеме механизма
λ_s2 = 0.32  # - относительное положение ЦМ на шатуне
a's_2' := λ_s2*b'a' = 7.6416  # мм
# откуда
P_as_2 := 228.14  # мм
# =>
a_S2 := P_as_2/μ_a = 285.175  # м/с^2
# Определение сил инерции
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Φ_1 := m_1*a_S1 = 0  # Н
Φ_2 := m_2*a_S2 = 855.525  # Н
Φ_3 := m_3*a_S3 = 1195.65  # Н
# Определение главных моментов сил инерции
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M_Φ1 := J_1S*ε_1 = 715.778  # Н*м
M_Φ2 := J_2S*ε_2 = 5.79505  # Н*м
M_Φ3 := 0  # Н*м
# Звено 3 - находим плечо h
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# ΣM_B = R_03*h=0  =>  h=0
# Группа звеньев 3-2
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Φ_2 = 855.525  # Н
l_AB = 0.242  # м
Φ_3 = 1195.65  # Н
l_AS2 := l_AB*λ_s2 = 0.07744  # м
l_S2B := l_AB - l_AS2 = 0.16456  # м
M_Φ2 = 5.79505  # Н*м
G_2 := m_2*g = 29.421  # Н
M_Φ3 = 0  # Н*м
G_3 := m_3*g = 39.228  # Н
α := 27.4°
β := 24.47°
F_д := 9483  # Н
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solve block
    # guess values
    R_12τ := 0
    # constraints
    R_12τ*l_AB + G_2*l_S2B*cos(α) - Φ_2*l_S2B*sin(β) + M_Φ2 == 0
    # solver
    R_12τ := Find(R_12τ)
    # ΣM_B=
end solve block
R_12τ = 199.265  # Н
# Дальше из плана сил находим неизвестные значения
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μ_F := 0.02  # мм/Н
R_12τ*μ_F = 3.9853  # мм
Φ_2*μ_F = 17.1105  # мм
Φ_3*μ_F = 23.913  # мм
G_2*μ_F = 0.58842  # мм
G_3*μ_F = 0.78456  # мм
F_д*μ_F = 189.66  # мм
l_R12n := 169.52  # мм
# =>
R_12n := l_R12n/μ_F = 8476  # Н
R_12 := sqrt(R_12n^2 + R_12τ^2) = 8478.34  # Н
l_R03 := 83.8  # мм
# =>
R_03 := l_R03/μ_F = 4190  # Н
# Звено 3 - находим R_23
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μ_F := 0.02  # мм/Н
# Из плана сил находим R_23
l_R23 := 185.46  # мм
R_23 := l_R23/μ_F = 9273  # Н
# Первичный механизм
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G_1 := m_1*g = 98.07  # Н
R_21 := R_12 = 8478.34  # Н
l_OA = 0.203  # мм
γ := 9.27°
M_Φ1 = 715.778  # Н*м
# В системе сил, действующих на начальное звено, учитывают, что центр масс S_1 начального звена совпадает с центром неподвижной вращательной пары O. Кроме того, на начальное звено в шарнире A со стороны отброшенного звена 2 действует реакции R_21. Эта реакция известна, так была получена в ходе предварительного анализа группы, связанной с начальным звеном. В паре O действует реакция R_01 со стороны отброшенной стойки. Никаких других внешних сил на начальное звено, больше не действуют. Следовательно, кроме этой реакции из внешних воздействий остаются только сила тяжести G_1 и момент сил инерции M_Φ1. Кроме них для обеспечения равновесия начального звена необходимо продолжить неизвестный заранее внешний уравновешивающий момент M_ур. В нашем случае это M_1с
μ_F := 0.02  # мм/Н
G_1*μ_F = 1.9614  # мм
R_21*μ_F = 169.567  # мм
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# Из плана сил находим
l_R01τ := 167.05  # мм
# =>
R_01τ := l_R01τ/μ_F = 8352.5  # Н
l_R01n := 26.49  # мм
# =>
R_01n := l_R01n/μ_F = 1324.5  # Н
R_01 := sqrt(R_01τ^2 + R_01n^2) = 8456.86  # Н
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solve block
    # guess values
    M_1с := 0
    # constraints
    R_21*cos(γ)*l_OA - M_Φ1 - M_1с == 0
    # solver
    M_1с := Find(M_1с)
    # ΣM_B=
end solve block
R_21*cos(γ)*l_OA = 1698.63  # Н*м
M_Φ1 = 715.778  # Н*м
M_с = 980.7  # Н*м
M_1с = 982.848  # Н*м
M_с = 980.7  # Н*м
ΔM_c := |M_с - M_1с|/M_с*100 = 0.219051  # %
